// SBML level 3 version 1

model CM_PM12648679_MB10__Substrate_depletion_oscillator_Deterministic()
  // CM_PM12648679_MB10::Substrate_depletion_oscillator_Deterministic
  // This ModelBrick from the article, "Sniffers, buzzers, toggles and blinkers…" describes a substrate-depletion oscillator. Species X is converted into R in an autocatalytic process. At first, X is abundant and R is scarce. As R builds up, R production accelerates until there is an explosive conversion of the entire pool of X into R. Then the autocatalytic reaction shuts off for lack of substrate, X. R is degraded, and X must build up again before another burst of R is produced. This is essentially the mechanism of MPF oscillations in frog egg extracts.
  // model units - substance: mol, time: s, volume: litre_base, area: m2, length: m

  // Compartments:
  compartment env = 1 litre_base;

  // Species:
  // Response element. In the mechanism of MPF oscillations in frog egg extracts, R is the unphosphorylated form of cyclin B-CDK1 or active MPF.
  species R in env = 0;
  // species X.
  // In the mechanism of MPF oscillations in frog egg extracts, R is the phosphorylated form of cyclin B-CDK1
  species X in env = 0;
  // signal strength. Rate of synthesis of species X
  species $S in env = 0;
  // phosphorylated form of E, an enzymatic protein.
  // In the mechanism of MPF oscillations in frog egg extracts, Ep is the phosphatase Cdc25
  species $Ep in env;
  // enzymatic protein.
  // In the mechanism of MPF oscillations in frog egg extracts, E is the unphosphorylated form of the phosphatase Cdc25
  species $E in env;

  // Parameters:
  k0_prime = 0.01 s_1;
  k0 = 0.4 M_1_s_1;
  k1 = 1 s_1;
  k2 = 1 s_1;
  k3 = 1 s_1;
  J3 = 0.05 _one_;
  k4 = 0.3 mol_s_1_l_1;
  J4 = 0.05 _one_;
  Et = 1 M;
  Km3 has M;
  Km4 has M;
  _T_ = 300 K;
  _PI_ = 3.141593 _one_;
  _F_ = 9.64853321e4 C_mol_1;
  _F_nmol_ = 9.64853321e-5 C_nmol_1;
  _N_pmol_ = 6.02214179e11 molecules_pmol_1;
  _K_GHK_ = 1e-9 _one_000000000;
  _R_ = 8314.463 mV_C_K_1_mol_1;
  K_millivolts_per_volt = 1000 mV_V_1;
  KMOLE = 0.001660539 uM_um3_molecules_1;

  // Assignment rules:
  Km3 := J3*Et;
  Km4 := J4*Et;
  E := Et + (-Ep);
  Ep := 2*k3*R*J4*(1/(k4 + (-(k3*R)) + J3*k4 + J4*k3*R + ((k4 + (-(k3*R)) + J3*k4 + J4*k3*R)^2 + (-(4*(k4 + (-(k3*R)))*k3*R*J4)))^(1*(1/2))))*Et;

  // Reactions:
  // X is converted into R in an autocatalytic process, modulated by the phosphorylated form of the enzymatic protein (Ep)
  X_conversion_to_R: X -> R; (k0_prime + k0*Ep)*X*env;  // modifiers: Ep
  // Synthesis of X, modulated by the signal strength (S)
  X_synthesis: -> X; k1*S*env;  // modifiers: S
  // degradation of te response element (R)
  R_degradation: R -> ; k2*R*env;
  // phosphorylation of the enzymatic protein (E), modulated by the response element (R)
  E_phosphorylation: $E -> $Ep; k3*R*E*(1/(Km3 + E))*env;  // modifiers: R
  // dephosphorylation of the enzymatic protein (E)
  E_dephosphorylation: $Ep -> $E; k4*Ep*(1/(Km4 + Ep))*env;

  // Unit definitions:
  unit mol = mole;
  unit litre_base = litre; litre_base is "Base unit litre";
  unit m2 = metre^2;
  unit m = metre;
  unit s = second;
  unit s_1 = 1 / second;
  unit M_1_s_1 = litre / (mole * second);
  unit _one_ = dimensionless;
  unit mol_s_1_l_1 = mole / (second * litre);
  unit M = mole / litre;
  unit K = kelvin;
  unit C_mol_1 = coulomb / mole;
  unit C_nmol_1 = coulomb / (1e-9 mole);
  unit molecules_pmol_1 = item / (1e-12 mole);
  unit _one_000000000 = 1e9 dimensionless;
  unit mV_C_K_1_mol_1 = 1e-3 volt * coulomb / (kelvin * mole);
  unit mV_V_1 = dimensionless;
  unit uM_um3_molecules_1 = 1e-6 mole * (1e-6 metre)^3 / (litre * item);
end
