// SBML level 3 version 1

model CM_PM12648679_MB1__Protein_synthesis_degradation_Linear()
  // CM_PM12648679_MB1::Protein_synthesis_degradation_Linear
  // This ModelBrick from the article, “Sniffers, buzzers, toggles and blinkers…” describes protein synthesis and degradation that yields a linear signal-response curve.
  // model units - substance: molecules, time: s, volume: um3, area: um2, length: um

  // Compartments:
  compartment c0 = 50000 um3;

  // Species:
  // R = response element. For example, R could be the concentration of protein.
  species R in c0 = 0;
  // S = signal strength. For example, S could be the concentration of mRNA.
  species S in c0 = time;

  // Parameters:
  _T_ = 300 K;
  _PI_ = 3.141593 _one_;
  _F_ = 9.64853321e4 C_mol_1;
  _F_nmol_ = 9.64853321e-5 C_nmol_1;
  _N_pmol_ = 6.02214179e11 molecules_pmol_1;
  _K_GHK_ = 1e-9 _one_000000000;
  _R_ = 8314.463 mV_C_K_1_mol_1;
  K_millivolts_per_volt = 1000 mV_V_1;
  KMOLE = 0.001660539 uM_um3_molecules_1;
  kd_R_degradation = 5 s_1;
  Kf_R_degradation has s_1;
  k_R_synthesis = 1 s_1;

  // Assignment rules:
  Kf_R_degradation := kd_R_degradation;

  // Reactions:
  // Degradation of the response element (R)
  R_degradation: R -> ; Kf_R_degradation*R*c0;
    Kr = 0 uM_s_1;
  // Synthesis of the response element (R)
  R_synthesis: -> R; k_R_synthesis*S*c0;  // modifiers: S

  // Unit definitions:
  unit molecules = item;
  unit um3 = (1e-6 metre)^3;
  unit um2 = (1e-6 metre)^2;
  unit um = 1e-6 metre;
  unit s = second;
  unit K = kelvin;
  unit _one_ = dimensionless;
  unit C_mol_1 = coulomb / mole;
  unit C_nmol_1 = coulomb / (1e-9 mole);
  unit molecules_pmol_1 = item / (1e-12 mole);
  unit _one_000000000 = 1e9 dimensionless;
  unit mV_C_K_1_mol_1 = 1e-3 volt * coulomb / (kelvin * mole);
  unit mV_V_1 = dimensionless;
  unit uM_um3_molecules_1 = 1e-6 mole * (1e-6 metre)^3 / (litre * item);
  unit uM_s_1 = 1e-6 mole / (litre * second);
  unit s_1 = 1 / second;
end
