// SBML level 3 version 1

model CM_PM12648679_MB2__Protein_phosphorylation_hyperbolic_Hyperbolic()
  // CM_PM12648679_MB2::Protein_phosphorylation_hyperbolic_Hyperbolic
  // This ModelBrick from the article, "Sniffers, buzzers, toggles and blinkers..." describes protein phosphorylation and dephosphorylation, yielding a hyperbolic signal-response curve.
  // model units - substance: molecules, time: s, volume: um3, area: um2, length: um

  // Compartments:
  compartment c0 = 50000 um3;

  // Species:
  // R = response magnitude. For example, R could be the concentration of protein.
  species R in c0 = 1;
  // RP = phosphorylated form of the response element. The phosphorylated form of R is supposed to be the active form.
  species RP in c0 = 0;
  // S = signal strength. For example, S could be the concentration of mRNA.
  species S in c0 = time;

  // Parameters:
  _T_ = 300 K;
  _PI_ = 3.141593 _one_;
  _F_ = 9.64853321e4 C_mol_1;
  _F_nmol_ = 9.64853321e-5 C_nmol_1;
  _N_pmol_ = 6.02214179e11 molecules_pmol_1;
  _K_GHK_ = 1e-9 _one_000000000;
  _R_ = 8314.463 mV_C_K_1_mol_1;
  K_millivolts_per_volt = 1000 mV_V_1;
  KMOLE = 0.001660539 uM_um3_molecules_1;
  kf_R_phosphorylation = 1 s_1_uM_1;
  Kf_R_dephosphorylation = 1 s_1;
  Kr_R_dephosphorylation = 0 s_1;

  // Reactions:
  // Phosphorylation of the response element.
  R_phosphorylation: R -> RP; kf_R_phosphorylation*R*S*c0;  // modifiers: S
  // Dephosphorylation of the response element.
  R_dephosphorylation: RP -> R; (Kf_R_dephosphorylation*RP + (-(Kr_R_dephosphorylation*R)))*c0;

  // Unit definitions:
  unit molecules = item;
  unit um3 = (1e-6 metre)^3;
  unit um2 = (1e-6 metre)^2;
  unit um = 1e-6 metre;
  unit s = second;
  unit K = kelvin;
  unit _one_ = dimensionless;
  unit C_mol_1 = coulomb / mole;
  unit C_nmol_1 = coulomb / (1e-9 mole);
  unit molecules_pmol_1 = item / (1e-12 mole);
  unit _one_000000000 = 1e9 dimensionless;
  unit mV_C_K_1_mol_1 = 1e-3 volt * coulomb / (kelvin * mole);
  unit mV_V_1 = dimensionless;
  unit uM_um3_molecules_1 = 1e-6 mole * (1e-6 metre)^3 / (litre * item);
  unit s_1_uM_1 = litre / (second * 1e-6 mole);
  unit s_1 = 1 / second;
end
