// SBML level 3 version 1

model CM_PM12648679_MB3__Protein_phosphorylation_sigmoidal_Sigmoidal()
  // CM_PM12648679_MB3::Protein_phosphorylation_sigmoidal_Sigmoidal
  // This ModelBrick from the article, "Sniffers, buzzers, toggles and blinkers…" describes protein phosphorylation and dephosphorylation reactions governed by Michelis-Menten kinetics, yielding a sigmoidal signal-response curve.
  // model units - substance: molecules, time: s, volume: um3, area: um2, length: um

  // Compartments:
  compartment c0 = 50000 um3;

  // Species:
  // signal strength. For example, S could be the concentration of mRNA.
  species S in c0 = time;
  // response magnitude. For example, R could be the concentration of protein.
  species R in c0 = 1;
  // phosphorylated form of the response element. The phosphorylated form of R is supposed to be the active form.
  species PR in c0 = 0;

  // Parameters:
  _T_ = 300 K;
  _PI_ = 3.141593 _one_;
  _F_ = 9.64853321e4 C_mol_1;
  _F_nmol_ = 9.64853321e-5 C_nmol_1;
  _N_pmol_ = 6.02214179e11 molecules_pmol_1;
  _K_GHK_ = 1e-9 _one_000000000;
  _R_ = 8314.463 mV_C_K_1_mol_1;
  K_millivolts_per_volt = 1000 mV_V_1;
  KMOLE = 0.001660539 uM_um3_molecules_1;
  Km_protein_phos = 1 uM;
  Vmax_protein_phos has uM_s_1;
  Km_protein_dephos = 1 uM;
  Vmax_protein_dephos = 1 uM_s_1;

  // Assignment rules:
  Vmax_protein_phos := S;

  // Reactions:
  // Phosphorylation of the response element.
  protein_phos: R -> PR; Vmax_protein_phos*R*(1/(Km_protein_phos + R))*c0;  // modifiers: S
  // Dephosphorylation of the response element.
  protein_dephos: PR -> R; Vmax_protein_dephos*PR*(1/(Km_protein_dephos + PR))*c0;

  // Unit definitions:
  unit molecules = item;
  unit um3 = (1e-6 metre)^3;
  unit um2 = (1e-6 metre)^2;
  unit um = 1e-6 metre;
  unit s = second;
  unit K = kelvin;
  unit _one_ = dimensionless;
  unit C_mol_1 = coulomb / mole;
  unit C_nmol_1 = coulomb / (1e-9 mole);
  unit molecules_pmol_1 = item / (1e-12 mole);
  unit _one_000000000 = 1e9 dimensionless;
  unit mV_C_K_1_mol_1 = 1e-3 volt * coulomb / (kelvin * mole);
  unit mV_V_1 = dimensionless;
  unit uM_um3_molecules_1 = 1e-6 mole * (1e-6 metre)^3 / (litre * item);
  unit uM = 1e-6 mole / litre;
  unit uM_s_1 = 1e-6 mole / (litre * second);
end
