// SBML level 3 version 1

model CM_PM12648679_MB4__Perfect_adaptation_PerfectlyAdapted()
  // CM_PM12648679_MB4::Perfect_adaptation_PerfectlyAdapted
  // This ModelBrick from the article, "Sniffers, buzzers, toggles and blinkers…” describes a simple linear response element supplemented with a second signaling pathway (through species X), creating a response mechanism that exhibits perfect adaptation to the signal. Although the signaling pathway exhibits a transient response to changes in signal strength, its steady-state response is independent of the signal strength (S).
  // model units - substance: molecules, time: s, volume: um3, area: um2, length: um

  // Compartments:
  compartment c0 = 50000 um3;

  // Species:
  // S = signal strength. For example, S could be the concentration of mRNA.
  species S in c0 = 1;
  // response element. For example, R could be the concentration of protein.
  species R in c0 = 0;
  // Species X. Provides a second signaling pathway in the model.
  species X in c0 = 0;

  // Parameters:
  _T_ = 300 K;
  _PI_ = 3.141593 _one_;
  _F_ = 9.64853321e4 C_mol_1;
  _F_nmol_ = 9.64853321e-5 C_nmol_1;
  _N_pmol_ = 6.02214179e11 molecules_pmol_1;
  _K_GHK_ = 1e-9 _one_000000000;
  _R_ = 8314.463 mV_C_K_1_mol_1;
  K_millivolts_per_volt = 1000 mV_V_1;
  KMOLE = 0.001660539 uM_um3_molecules_1;
  k4_X_degradation = 1 s_1;
  Kf_X_degradation has s_1;
  k3_X_synthesis = 1 s_1;
  k1_R_synthesis = 2 s_1;
  k2_R_degradation = 2 s_1_uM_1;

  // Assignment rules:
  Kf_X_degradation := k4_X_degradation;

  // Reactions:
  // Degradation of species X
  X_degradation: X -> ; Kf_X_degradation*X*c0;
    Kr = 0 uM_s_1;
  // Synthesis of species X
  X_synthesis: -> X; k3_X_synthesis*S*c0;  // modifiers: S
  // Synthesis of the response element.
  R_synthesis: -> R; k1_R_synthesis*S*c0;  // modifiers: S
  // Degradation of the response element
  R_degradation: R -> ; k2_R_degradation*X*R*c0;  // modifiers: X

  // Events:
  event0: at (((time >= 4) && (time <= 4 + 2)) || ((time >= 8) && (time <= 8 + 2)) || ((time >= 12) && (time <= 12 + 2)) || ((time >= 16) && (time <= 16 + 2))), t0=false: S = 0.2 + S;

  // Unit definitions:
  unit molecules = item;
  unit um3 = (1e-6 metre)^3;
  unit um2 = (1e-6 metre)^2;
  unit um = 1e-6 metre;
  unit s = second;
  unit K = kelvin;
  unit _one_ = dimensionless;
  unit C_mol_1 = coulomb / mole;
  unit C_nmol_1 = coulomb / (1e-9 mole);
  unit molecules_pmol_1 = item / (1e-12 mole);
  unit _one_000000000 = 1e9 dimensionless;
  unit mV_C_K_1_mol_1 = 1e-3 volt * coulomb / (kelvin * mole);
  unit mV_V_1 = dimensionless;
  unit uM_um3_molecules_1 = 1e-6 mole * (1e-6 metre)^3 / (litre * item);
  unit uM_s_1 = 1e-6 mole / (litre * second);
  unit s_1 = 1 / second;
  unit s_1_uM_1 = litre / (second * 1e-6 mole);
end
