// SBML level 3 version 1

model CM_PM12648679_MB5__Activator_inhibitor_Deterministic()
  // CM_PM12648679_MB5::Activator_inhibitor_Deterministic
  // This ModelBrick from the article, "Sniffers, buzzers, toggles and blinkers…" describes a system containing both positive and negative feedback, resulting in oscillations. The response element (R) is created in an autocatalytic process, and then it promotes the production of an inhibitor, X, which speeds up R removal. First, R builds up, then comes X to force R back down, then X disappears and R can rise again.
  // model units - substance: mol, time: s, volume: litre_base, area: m2, length: m

  // Compartments:
  compartment env = 1 litre_base;

  // Species:
  // response element
  species R in env = 0;
  // an inhibitor that speeds up R removal
  species X in env = 0;
  // signal strength
  species $S in env = 0;
  // a protein involved with R in mutual activation or inhibition
  species $E in env;
  // phosphorylated form of E, a protein involved with R in mutual activation or inhibition
  species $Ep in env;

  // Parameters:
  k0 = 4 s_1;
  k1 = 1 s_1;
  k2 = 1 s_1;
  k2_prime = 1 M_1_s_1;
  k3 = 1 s_1;
  J3 = 0.3 _one_;
  k4 = 1 mol_s_1_l_1;
  J4 = 0.3 _one_;
  k5 = 0.1 s_1;
  k6 = 0.075 s_1;
  Et = 1 M;
  Km3 has M;
  Km4 has M;
  _T_ = 300 K;
  _PI_ = 3.141593 _one_;
  _F_ = 9.64853321e4 C_mol_1;
  _F_nmol_ = 9.64853321e-5 C_nmol_1;
  _N_pmol_ = 6.02214179e11 molecules_pmol_1;
  _K_GHK_ = 1e-9 _one_000000000;
  _R_ = 8314.463 mV_C_K_1_mol_1;
  K_millivolts_per_volt = 1000 mV_V_1;
  KMOLE = 0.001660539 uM_um3_molecules_1;

  // Assignment rules:
  Km3 := J3*Et;
  Km4 := J4*Et;
  E := Et + (-Ep);
  Ep := 2*k3*R*J4*(1/(k4 + (-(k3*R)) + J3*k4 + J4*k3*R + ((k4 + (-(k3*R)) + J3*k4 + J4*k3*R)^2 + (-(4*(k4 + (-(k3*R)))*k3*R*J4)))^(1*(1/2))))*Et;

  // Reactions:
  // The response element (R) is created in an autocatalytic process.
  R_synthesis: -> R; k0*Ep*env;  // modifiers: Ep
  // The response element (R) is created in an autocatalytic process.
  R_synthesis2: -> R; k1*S*env;  // modifiers: S
  // degradation of the response element
  R_degradation: R -> ; k2*R*env;
  // the inhibitor X speeds up the removal of the response element (R)
  R_degradation_by_X: R -> ; k2_prime*R*X*env;  // modifiers: X
  // phosphorylation of E, a protein involved with R in mutual activation or inhibition
  E_phosphorylation: $E -> $Ep; k3*R*E*(1/(Km3 + E))*env;  // modifiers: R
  // dephosphorylation of E, a protein involved with R in mutual activation or inhibition
  E_dephosphorylation: $Ep -> $E; k4*Ep*(1/(Km4 + Ep))*env;
  // the production of an inhibitor, X, is promoted by R
  X_synthesis: -> X; k5*R*env;  // modifiers: R
  // Degradation of the inhibitor X
  X_degradation: X -> ; k6*X*env;

  // Unit definitions:
  unit mol = mole;
  unit litre_base = litre; litre_base is "Base unit litre";
  unit m2 = metre^2;
  unit m = metre;
  unit s = second;
  unit s_1 = 1 / second;
  unit M_1_s_1 = litre / (mole * second);
  unit _one_ = dimensionless;
  unit mol_s_1_l_1 = mole / (second * litre);
  unit M = mole / litre;
  unit K = kelvin;
  unit C_mol_1 = coulomb / mole;
  unit C_nmol_1 = coulomb / (1e-9 mole);
  unit molecules_pmol_1 = item / (1e-12 mole);
  unit _one_000000000 = 1e9 dimensionless;
  unit mV_C_K_1_mol_1 = 1e-3 volt * coulomb / (kelvin * mole);
  unit mV_V_1 = dimensionless;
  unit uM_um3_molecules_1 = 1e-6 mole * (1e-6 metre)^3 / (litre * item);
end
