// SBML level 3 version 1

model CM_PM12648679_MB7__Mutual_inhibition_Deterministic()
  // CM_PM12648679_MB7::Mutual_inhibition_Deterministic
  // This ModelBrick from the article, "Sniffers, buzzers, toggles and blinkers…" is a toggle switch that describes mutual inhibition, where the response element (R) inhibits a protein E, and E promotes the degradation of R. R and E are mutually antagonistic.
  // model units - substance: mol, time: s, volume: litre_base, area: m2, length: m

  // Compartments:
  compartment env = 1 litre_base;

  // Species:
  // response element
  species R in env = 0;
  // signal strength
  species $S in env = 0;
  // phosphorylated form of E, a protein involved with R in mutual inhibition
  species $Ep in env;
  // a protein involved with R in mutual inhibition
  species $E in env;

  // Parameters:
  k0 = 0 mol_s_1_l_1;
  k1 = 0.05 s_1;
  k2 = 0.1 s_1;
  k2_prime = 0.5 M_1_s_1;
  k3 = 0.2 mol_s_1_l_1;
  J3 = 0.05 _one_;
  k4 = 1 s_1;
  J4 = 0.05 _one_;
  Et = 1 M;
  Km3 has M;
  Km4 has M;
  _T_ = 300 K;
  _PI_ = 3.141593 _one_;
  _F_ = 9.64853321e4 C_mol_1;
  _F_nmol_ = 9.64853321e-5 C_nmol_1;
  _N_pmol_ = 6.02214179e11 molecules_pmol_1;
  _K_GHK_ = 1e-9 _one_000000000;
  _R_ = 8314.463 mV_C_K_1_mol_1;
  K_millivolts_per_volt = 1000 mV_V_1;
  KMOLE = 0.001660539 uM_um3_molecules_1;

  // Assignment rules:
  Km3 := J3*Et;
  Km4 := J4*Et;
  E := Et*2*k3*J4*(1/(k4*R + (-k3) + J3*k4*R + J4*k3 + ((k4*R + (-k3) + J3*k4*R + J4*k3)^2 + (-(4*(k4*R + (-k3))*k3*J4)))^(1*(1/2))));
  Ep := Et + (-E);

  // Reactions:
  // Synthesis of the response element (R)
  R_synthesis: -> R; k0*env;
  // synthesis of the response element (R) modulated by the signal strength (S)
  R_synthesis2: -> R; k1*S*env;  // modifiers: S
  // degradation of the response element (R)
  R_degradation: R -> ; k2*R*env;
  // Degradation of the response element (R) modulated by E, a protein involved with R in mutual inhibition
  R_degradation2: R -> ; k2_prime*R*E*env;  // modifiers: E
  // dephosphorylation of E, a protein involved with R in mutual inhibition
  E_dephosphorylation: $Ep -> $E; k3*Ep*(1/(Km3 + Ep))*env;
  // phosphorylation of E, a protein involved with R in mutual inhibition
  E_phosphorylation: $E -> $Ep; k4*R*E*(1/(Km4 + E))*env;  // modifiers: R

  // Unit definitions:
  unit mol = mole;
  unit litre_base = litre; litre_base is "Base unit litre";
  unit m2 = metre^2;
  unit m = metre;
  unit s = second;
  unit mol_s_1_l_1 = mole / (second * litre);
  unit s_1 = 1 / second;
  unit M_1_s_1 = litre / (mole * second);
  unit _one_ = dimensionless;
  unit M = mole / litre;
  unit K = kelvin;
  unit C_mol_1 = coulomb / mole;
  unit C_nmol_1 = coulomb / (1e-9 mole);
  unit molecules_pmol_1 = item / (1e-12 mole);
  unit _one_000000000 = 1e9 dimensionless;
  unit mV_C_K_1_mol_1 = 1e-3 volt * coulomb / (kelvin * mole);
  unit mV_V_1 = dimensionless;
  unit uM_um3_molecules_1 = 1e-6 mole * (1e-6 metre)^3 / (litre * item);
end
