// SBML level 3 version 1

model CM_PM12648679_MB9__Negative_feedback_oscillator_Deterministic()
  // CM_PM12648679_MB9::Negative_feedback_oscillator_Deterministic
  // This ModelBrick from the article, "Sniffers, buzzers, toggles and blinkers..." describes negative feedback (X activates Y through phosphorylation, phospho-Y in turn activates R through phosphorylation, with phospho-R degrading X) creating an oscillatory response.
  // model units - substance: mol, time: s, volume: litre_base, area: m2, length: m

  // Compartments:
  compartment env = 1 litre_base;

  // Species:
  // phosphorylated form of the response element
  species Rp in env = 0;
  // species X
  species X in env = 0;
  // phosphorylated form of species Y
  species Yp in env = 0;
  // signal strength
  species $S in env = 0;
  // Species Y is the third component of the negative feedback loop. Sustained oscillations require at least three components. Species Y introduces a time delay in the feedback loop, causing the control system repeatedly to overshoot and undershoot its steady state.
  species $Y in env;
  // response element
  species $R in env;

  // Parameters:
  k0 = 0 mol_s_1_l_1;
  k1 = 1 s_1;
  k2 = 0.01 s_1;
  k2_prime = 10 M_1_s_1;
  k3 = 0.1 s_1;
  Yt = 1 M;
  Km3 = 0.01 M;
  k4 = 0.2 mol_s_1_l_1;
  Km4 = 0.01 M;
  k5 = 0.1 s_1;
  Rt = 1 M;
  Km5 = 0.01 M;
  k6 = 0.05 mol_s_1_l_1;
  Km6 = 0.01 M;
  _T_ = 300 K;
  _PI_ = 3.141593 _one_;
  _F_ = 9.64853321e4 C_mol_1;
  _F_nmol_ = 9.64853321e-5 C_nmol_1;
  _N_pmol_ = 6.02214179e11 molecules_pmol_1;
  _K_GHK_ = 1e-9 _one_000000000;
  _R_ = 8314.463 mV_C_K_1_mol_1;
  K_millivolts_per_volt = 1000 mV_V_1;
  KMOLE = 0.001660539 uM_um3_molecules_1;

  // Assignment rules:
  R := Rt + (-Rp);
  Y := Yt + (-Yp);

  // Reactions:
  // synthesis of X modulated by S
  X_synthesis: -> X; (k0 + k1*S)*env;  // modifiers: S
  // degradation of X, modulated by Rp
  X_degradation: X -> ; (k2 + k2_prime*Rp)*X*env;  // modifiers: Rp
  // phosphorylation of Y, modulated by X
  Y_phosphorylation: $Y -> Yp; k3*X*(Yt + (-Yp))*(1/(Km3 + Yt + (-Yp)))*env;  // modifiers: X
  // dephosphorylation of Y
  Y_dephosphorylation: Yp -> $Y; k4*Yp*(1/(Km4 + Yp))*env;
  // phosphorylation of R, modulated by Yp
  R_phosphorylation: $R -> Rp; k5*Yp*(Rt + (-Rp))*(1/(Km5 + Rt + (-Rp)))*env;  // modifiers: Yp
  // dephosphorylation of R
  R_dephosphorylation: Rp -> $R; k6*Rp*(1/(Km6 + Rp))*env;

  // Unit definitions:
  unit mol = mole;
  unit litre_base = litre; litre_base is "Base unit litre";
  unit m2 = metre^2;
  unit m = metre;
  unit s = second;
  unit mol_s_1_l_1 = mole / (second * litre);
  unit s_1 = 1 / second;
  unit M_1_s_1 = litre / (mole * second);
  unit M = mole / litre;
  unit K = kelvin;
  unit _one_ = dimensionless;
  unit C_mol_1 = coulomb / mole;
  unit C_nmol_1 = coulomb / (1e-9 mole);
  unit molecules_pmol_1 = item / (1e-12 mole);
  unit _one_000000000 = 1e9 dimensionless;
  unit mV_C_K_1_mol_1 = 1e-3 volt * coulomb / (kelvin * mole);
  unit mV_V_1 = dimensionless;
  unit uM_um3_molecules_1 = 1e-6 mole * (1e-6 metre)^3 / (litre * item);
end
