// SBML level 3 version 1

model CM_PM25628036_MB1__GEF_activation_Canonical_Application()
  // CM_PM25628036_MB1::GEF_activation_Canonical Application
  // This ModelBrick from the article, "Positive regulation of Rho GTPase activity by RhoGDIs as a result of their direct interaction with GAPs" describes the activation of GEF and the degradation of the activator. GDIs inhibit GEF and GAP activities by sequestering GTPase (kinetic law was adjusted to eliminate effect of GDI on both GEF and GAP).
  // model units - substance: umol, time: min, volume: l, area: m2, length: m

  // Compartments:
  compartment default = 1 l;

  // Species:
  // The authors used 1 uM for the cellular concentration of the activator (arbitrary value).
  species Activator in default = 1;
  // guanine nucleotide exchange factor (GEF)- regulator of RhoGTPases. GEFs activate GTPases by promoting the exchange of GDP for GTP. GAPs inactivate GTPases by stimulating their intrinsic GTP-hydrolyzing activity. The authors used 0.31 uM for the cellular concentration of GEF (Aoki, 2007).
  species GEF in default = 0.31;
  // guanine nucleotide exchange factor (GEF)- regulator of RhoGTPases. GEFs activate GTPases by promoting the exchange of GDP for GTP. GAPs inactivate GTPases by stimulating their intrinsic GTP-hydrolyzing activity.
  species Active_GEF in default = 0;

  // Parameters:
  k3 = 0.5 min_1;
  k2 = 0.1 min_1;
  kcatGEF = 5.64 min_1;
  KmGEFRho = 24.5 umol_l_1;
  KmGEFGDI = 1 umol_l_1;
  k1 = 1 l_umol_1_min_1;
  _T_ = 300 K;
  _PI_ = 3.141593 _one_;
  _F_ = 9.64853321e4 C_mol_1;
  _F_nmol_ = 9.64853321e-5 C_nmol_1;
  _N_pmol_ = 6.02214179e11 molecules_pmol_1;
  _K_GHK_ = 1e-9 _one_000000000;
  _R_ = 8314.463 mV_C_K_1_mol_1;
  K_millivolts_per_volt = 1000 mV_V_1;
  KMOLE = 0.001660539 uM_um3_molecules_1;

  // Reactions:
  // Activation of GEF.
  // The forward reaction rate parameter (k1) is assigned an arbitrary value (1 uM-1min-1).
  GEF_activation: GEF -> Active_GEF; Activator*GEF*k1*default;  // modifiers: Activator
  // Inactivation of GEF.
  // The forward reaction rate parameter (k2) is assigned an arbitrary value (0.1 min-1).
  GEF_inactivation: Active_GEF -> GEF; Active_GEF*k2*default;
  // Activator degradation.
  // The forward reaction rate parameter (k3) is assigned an arbitrary value (1 uM-1min-1).
  Activator_degradation: Activator -> ; Activator*k3*default;

  // Unit definitions:
  unit umol = 1e-6 mole;
  unit l = litre;
  unit m2 = metre^2;
  unit m = metre;
  unit min = 60 second;
  unit min_1 = 1 / (60 second);
  unit umol_l_1 = 1e-6 mole / litre;
  unit l_umol_1_min_1 = litre / (1e-6 mole * 60 second);
  unit K = kelvin;
  unit _one_ = dimensionless;
  unit C_mol_1 = coulomb / mole;
  unit C_nmol_1 = coulomb / (1e-9 mole);
  unit molecules_pmol_1 = item / (1e-12 mole);
  unit _one_000000000 = 1e9 dimensionless;
  unit mV_C_K_1_mol_1 = 1e-3 volt * coulomb / (kelvin * mole);
  unit mV_V_1 = dimensionless;
  unit uM_um3_molecules_1 = 1e-6 mole * (1e-6 metre)^3 / (litre * item);
end
